// SBML level 3 version 1

function max(x, y)
  piecewise(x, x > y, y);
end
max is "maximum of arguments";

function min(x, y)
  piecewise(x, x < y, y);
end
min is "minimum of arguments";

model Hepatic_glucose_1()
  // Koenig Human Glucose Metabolism
  // Description
  // This is a metabolism model of Human glucose metabolism in SBML format.
  // This model is described in the article:
  // Quantifying the contribution of the liver to glucose homeostasis: a detailed kinetic model of human hepatic glucose metabolism.
  // König M., Bulik S., Holzhütter HG.
  // PLoS Comput Biol. 2012;8(6)
  // Abstract:
  // Despite the crucial role of the liver in glucose homeostasis, a detailed mathematical model of human hepatic glucose metabolism is lacking so far. Here we present a detailed kinetic model of glycolysis, gluconeogenesis and glycogen metabolism in human hepatocytes integrated with the hormonal control of these pathways by insulin, glucagon and epinephrine. Model simulations are in good agreement with experimental data on (i) the quantitative contributions of glycolysis, gluconeogenesis, and glycogen metabolism to hepatic glucose production and hepatic glucose utilization under varying physiological states. (ii) the time courses of postprandial glycogen storage as well as glycogen depletion in overnight fasting and short term fasting (iii) the switch from net hepatic glucose production under hypoglycemia to net hepatic glucose utilization under hyperglycemia essential for glucose homeostasis (iv) hormone perturbations of hepatic glucose metabolism. Response analysis reveals an extra high capacity of the liver to counteract changes of plasma glucose level below 5 mM (hypoglycemia) and above 7.5 mM (hyperglycemia). Our model may serve as an important module of a whole-body model of human glucose metabolism and as a valuable tool for understanding the role of the liver in glucose homeostasis under normal conditions and in diseases like diabetes or glycogen storage diseases.
  // The content of this model has been carefully created in a manual research effort.
  // This file has been produced by Matthias Koenig.
  // Terms of use
  // Copyright © 2016 Matthias Koenig.
  // Redistribution and use of any part of this model, with or without modification, are permitted provided that the following conditions are met:
  // Redistributions of this SBML file must retain the above copyright notice, this list of conditions and the following disclaimer.
  // Redistributions in a different form must reproduce the above copyright notice, this list of conditions and the following disclaimer in the documentation and/or other materials provided with the distribution.
  // This model is distributed in the hope that it will be useful, but WITHOUT ANY WARRANTY; without even the implied warranty of MERCHANTABILITY or FITNESS FOR A PARTICULAR PURPOSE.
  // model units - substance: mole, time: s, volume: m3, area: m2, length: m, extent: mole

  // Compartments:
  compartment mm = 1 m2; mm has m2; mm is "mitochondrial membrane";  // 2-D
  compartment mito; mito has m3; mito is "mitochondrion";
  compartment ext; ext has m3; ext is "blood";
  compartment cyto; cyto has m3; cyto is "cytosol";
  compartment pm = 1 m2; pm has m2; pm is "plasma membrane";  // 2-D

  // Species:
  species gdp in cyto = 0.1; gdp is "GDP";
  species $h_mito in mito = 0; h_mito is "H+";
  species fru6p in cyto = 0.05; fru6p is "fructose-6 phosphate";
  species $acoa_mito in mito = 0.04; acoa_mito is "acetyl-coenzyme A";
  species $cit_mito in mito = 0.32; cit_mito is "citrate";
  species oaa_mito in mito = 0.01; oaa_mito is "oxaloacetate";
  species glyglc in cyto = 250; glyglc is "glycogen";
  species pyr_mito in mito = 0.1; pyr_mito is "pyruvate";
  species $co2_mito in mito = 5; co2_mito is "CO2";
  species $atp_mito in mito = 2.8; atp_mito is "ATP";
  species pp in cyto = 0.008; pp is "pyrophosphate";
  species $co2 in cyto = 5; co2 is "CO2";
  species fru26bp in cyto = 0.004; fru26bp is "fructose-2,6 bisphosphate";
  species udpglc in cyto = 0.38; udpglc is "UDP-glucose";
  species $adp in cyto = 0.8; adp is "ADP";
  species $glc_ext in ext = 3; glc_ext is "glucose";
  species bpg13 in cyto = 0.3; bpg13 is "1,3-bisphospho-glycerate";
  species $h2o in cyto = 0; h2o is "H2O";
  species glc1p in cyto = 0.012; glc1p is "glucose-1 phosphate";
  species gdp_mito in mito = 0.1; gdp_mito is "GDP";
  species gtp in cyto = 0.29; gtp is "GTP";
  species dhap in cyto = 0.03; dhap is "dihydroxyacetone phosphate";
  species $phos_mito in mito = 5; phos_mito is "phosphate";
  species pyr in cyto = 0.1; pyr is "pyruvate";
  species fru16bp in cyto = 0.02; fru16bp is "fructose-1,6 bisphosphate";
  species $h2o_mito in mito = 0; h2o_mito is "H20";
  species udp in cyto = 0.09; udp is "UDP";
  species $nadh in cyto = 0.00056; nadh is "NADH";
  species $nadh_mito in mito = 0.24; nadh_mito is "NADH";
  species lac in cyto = 0.5; lac is "lactate";
  species pg2 in cyto = 0.03; pg2 is "2-phosphoglycerate";
  species pg3 in cyto = 0.27; pg3 is "3-phosphoglycerate";
  species $amp in cyto = 0.16; amp is "AMP";
  species glc6p in cyto = 0.12; glc6p is "glucose-6 phosphate";
  species $phos in cyto = 5; phos is "phosphate";
  species pep in cyto = 0.15; pep is "phosphoenolpyruvate";
  species $nad in cyto = 1.22; nad is "NAD+";
  species grap in cyto = 0.1; grap is "glyceraldehyde 3-phosphate";
  species $h in cyto = 0; h is "H+";
  species glc in cyto = 5; glc is "glucose";
  species $coa_mito in mito = 0.055; coa_mito is "coenzyme A";
  species $nad_mito in mito = 0.98; nad_mito is "NAD+";
  species $adp_mito in mito = 0.8; adp_mito is "ADP";
  species utp in cyto = 0.27; utp is "UTP";
  species pep_mito in mito = 0.15; pep_mito is "phosphoenolpyruvate";
  species $atp in cyto = 2.8; atp is "ATP";
  species oaa in cyto = 0.01; oaa is "oxaloacetate";
  species $lac_ext in ext = 1.2; lac_ext is "lactate";
  species gtp_mito in mito = 0.29; gtp_mito is "GTP";

  // Parameters:
  x_epi3 = 3.1 mM;
  K_val = 0.1 dimensionless;
  x_glu4 = 6.4 dimensionless;
  x_epi1 = 6090 pM;
  epi_f = 0.8 dimensionless;
  f_ext = 10 dimensionless; f_ext is "external volume factor";
  fliver = 0.5833333 dimensionless; fliver is "parenchymal fraction liver";
  sec_per_min = 60 s_per_min; sec_per_min is "conversion";
  x_ins1 = 818.9 pM;
  x_ins3 = 8.6 mM;
  x_ins2 = 0 pM;
  x_glu3 = 3.01 mM;
  x_ins4 = 4.2 dimensionless;
  x_glu1 = 190 pM;
  V_cyto = 0.001 m3; V_cyto is "cytosolic volume";
  x_epi4 = 8.4 dimensionless;
  f_mito = 0.2 dimensionless; f_mito is "mitochondrial volume factor";
  x_epi2 = 100 pM;
  Vliver = 0.0015 m3; Vliver is "liver volume";
  bodyweight = 70 kg;
  x_glu2 = 37.9 pM;
  scale_glyglc = scale; scale_glyglc has dimensionless;
  V_mito = f_mito*V_cyto; V_mito has m3; V_mito is "mitochondrial volume";
  conversion_factor = fliver*Vliver/V_cyto*sec_per_min*1e3/bodyweight; conversion_factor has s_per_min_kg;
  scale_gly = scale; scale_gly has dimensionless;
  scale = 1/60; scale has dimensionless;
  V_ext = f_ext*V_cyto; V_ext has m3; V_ext is "external volume";
  K_glu has pM;
  gamma has dimensionless;
  gtp_tot has mM;
  nadh_mito_tot has mM;
  glu_norm has pM;
  ins_norm has pM;
  atp_tot has mM; atp_tot is "ATP balance";
  K_epi has pM;
  GLY has mumol_per_min_kg; GLY is "glycogenolysis/glycogen synthesis";
  HGP has mumol_per_min_kg; HGP is "Hepatic glucose production/utilization";
  nadh_tot has mM;
  epi_norm has pM;
  K_ins has pM;
  GNG has mumol_per_min_kg; GNG is "gluconeogenesis/glycolysis";
  epi has pM;
  utp_tot has mM;
  gtp_mito_tot has mM;
  ins has pM;
  glu has pM;
  atp_mito_tot has mM;
  GLUT2_keq = 1 dimensionless;
  GLUT2_km = 42 mM;
  GLUT2_Vmax = 420 mol_per_s;
  GK_n_gkrp = 2 dimensionless;
  GK_km_glc1 = 15 mM;
  GK_km_fru6p = 0.01 mM;
  GK_b = 0.7 dimensionless;
  GK_n = 1.6 dimensionless;
  GK_km_glc = 7.5 mM;
  GK_km_atp = 0.26 mM;
  GK_Vmax = 25.2 mol_per_s;
  GK_gc_free has dimensionless;
  G6PASE_km_glc6p = 2 mM;
  G6PASE_Vmax = 18.9 mol_per_s;
  GPI_keq = 0.5170608 dimensionless;
  GPI_km_glc6p = 0.182 mM;
  GPI_km_fru6p = 0.071 mM;
  GPI_Vmax = 420 mol_per_s;
  G16PI_keq = 15.71755 dimensionless;
  G16PI_km_glc6p = 0.67 mM;
  G16PI_km_glc1p = 0.045 mM;
  G16PI_Vmax = 100 mol_per_s;
  UPGASE_keq = 0.3122376 dimensionless;
  UPGASE_km_utp = 0.563 mM;
  UPGASE_km_glc1p = 0.172 mM;
  UPGASE_km_udpglc = 0.049 mM;
  UPGASE_km_pp = 0.166 mM;
  UPGASE_Vmax = 80 mol_per_s;
  PPASE_km_pp = 0.005 mM;
  PPASE_Vmax = 2.4 mol_per_s;
  GS_C = 500 mM;
  GS_k1_max = 0.2 dimensionless;
  GS_k1_nat = 0.224 mM2;
  GS_k2_nat = 0.1504 mM;
  GS_k1_phospho = 3.003 mM2;
  GS_k2_phospho = 0.09029 mM;
  GS_Vmax = 13.2 mol_per_s;
  GS_phospho has mol_per_s;
  GS_k_udpglc_phospho has mM;
  GS_k_udpglc_native has mM;
  GS_native has mol_per_s;
  GS_storage_factor has dimensionless;
  GP_keq = 0.2118265 per_mM;
  GP_k_glyc_native = 4.8 mM;
  GP_k_glyc_phospho = 2.7 mM;
  GP_k_glc1p_native = 120 mM;
  GP_k_glc1p_phospho = 2 mM;
  GP_k_p_native = 300 mM;
  GP_k_p_phospho = 5 mM;
  GP_ki_glc_phospho = 5 mM;
  GP_ka_amp_native = 1 mM;
  GP_base_amp_native = 0.03 dimensionless;
  GP_max_amp_native = 0.3 dimensionless;
  GP_Vmax = 6.8 mol_per_s;
  GP_native has mol_per_s;
  GP_fmax has dimensionless;
  GP_vmax_native has mol_per_s;
  GP_phospho has mol_per_s;
  GP_vmax_phospho has mol_per_s;
  NDKGTP_keq = 1 dimensionless;
  NDKGTP_km_atp = 1.33 mM;
  NDKGTP_km_adp = 0.042 mM;
  NDKGTP_km_gtp = 0.15 mM;
  NDKGTP_km_gdp = 0.031 mM;
  NDKGTP_Vmax = 0 mol_per_s;
  NDKUTP_keq = 1 dimensionless;
  NDKUTP_km_atp = 1.33 mM;
  NDKUTP_km_adp = 0.042 mM;
  NDKUTP_km_utp = 16 mM;
  NDKUTP_km_udp = 0.19 mM;
  NDKUTP_Vmax = 2940 mol_per_s;
  AK_keq = 0.2473901 dimensionless;
  AK_km_atp = 0.09 mM;
  AK_km_amp = 0.08 mM;
  AK_km_adp = 0.11 mM;
  AK_Vmax = 0 mol_per_s;
  PFK2_n_native = 1.3 dimensionless;
  PFK2_n_phospho = 2.1 dimensionless;
  PFK2_k_fru6p_native = 0.016 mM;
  PFK2_k_fru6p_phospho = 0.05 mM;
  PFK2_k_atp_native = 0.28 mM;
  PFK2_k_atp_phospho = 0.65 mM;
  PFK2_Vmax = 0.0042 mol_per_s;
  PFK2_phospho has mol_per_s;
  PFK2_native has mol_per_s;

  // Assignment rules:
  mito := V_mito;
  ext := V_ext;
  cyto := V_cyto;
  K_glu := (x_glu1 - x_glu2)*K_val;
  gamma := 0.5*(1 - ins_norm/(ins_norm + K_ins) + max(glu_norm/(glu_norm + K_glu), epi_f*epi_norm/(epi_norm + K_epi)));
  gtp_tot := gtp + gdp;
  nadh_mito_tot := nadh_mito + nad_mito;
  glu_norm := max(0 pM, glu - x_glu2);
  ins_norm := max(0 pM, ins - x_ins2);
  atp_tot := atp + adp + amp;
  K_epi := (x_epi1 - x_epi2)*K_val;
  GLY := -G16PI*conversion_factor;
  HGP := GLUT2*conversion_factor;
  nadh_tot := nadh + nad;
  epi_norm := max(0 pM, epi - x_epi2);
  K_ins := (x_ins1 - x_ins2)*K_val;
  GNG := GPI*conversion_factor;
  epi := x_epi2 + (x_epi1 - x_epi2)*(1 - glc_ext^x_epi4/(glc_ext^x_epi4 + x_epi3^x_epi4));
  utp_tot := utp + udp + udpglc;
  gtp_mito_tot := gtp_mito + gdp_mito;
  ins := x_ins2 + (x_ins1 - x_ins2)*glc_ext^x_ins4/(glc_ext^x_ins4 + x_ins3^x_ins4);
  glu := x_glu2 + (x_glu1 - x_glu2)*(1 - glc_ext^x_glu4/(glc_ext^x_glu4 + x_glu3^x_glu4));
  atp_mito_tot := atp_mito + adp_mito;
  GK_gc_free := glc^GK_n_gkrp/(glc^GK_n_gkrp + GK_km_glc1^GK_n_gkrp)*(1 - GK_b*fru6p/(fru6p + GK_km_fru6p));
  GS_phospho := scale_glyglc*GS_Vmax*GS_storage_factor*udpglc/(GS_k_udpglc_phospho + udpglc);
  GS_k_udpglc_phospho := GS_k1_phospho/(glc6p + GS_k2_phospho);
  GS_k_udpglc_native := GS_k1_nat/(glc6p + GS_k2_nat);
  GS_native := scale_glyglc*GS_Vmax*GS_storage_factor*udpglc/(GS_k_udpglc_native + udpglc);
  GS_storage_factor := (1 + GS_k1_max)*(GS_C - glyglc)/(GS_C - glyglc + GS_k1_max*GS_C);
  GP_native := GP_vmax_native/(GP_k_glyc_native*GP_k_p_native)*(glyglc*phos - glc1p/GP_keq)/((1 + glyglc/GP_k_glyc_native)*(1 + phos/GP_k_p_native) + 1 + glc1p/GP_k_glc1p_native - 1);
  GP_fmax := (1 + GS_k1_max)*glyglc/(glyglc + GS_k1_max*GS_C);
  GP_vmax_native := scale_glyglc*GP_Vmax*GP_fmax*(GP_base_amp_native + (GP_max_amp_native - GP_base_amp_native)*amp/(amp + GP_ka_amp_native));
  GP_phospho := GP_vmax_phospho/(GP_k_glyc_phospho*GP_k_p_phospho)*(glyglc*phos - glc1p/GP_keq)/((1 + glyglc/GP_k_glyc_phospho)*(1 + phos/GP_k_p_phospho) + 1 + glc1p/GP_k_glc1p_phospho - 1);
  GP_vmax_phospho := scale_glyglc*GP_Vmax*GP_fmax*exp(-log10(2)/GP_ki_glc_phospho*glc);
  PFK2_phospho := scale_gly*PFK2_Vmax*fru6p^PFK2_n_phospho/(fru6p^PFK2_n_phospho + PFK2_k_fru6p_phospho^PFK2_n_phospho)*atp/(atp + PFK2_k_atp_phospho);
  PFK2_native := scale_gly*PFK2_Vmax*fru6p^PFK2_n_native/(fru6p^PFK2_n_native + PFK2_k_fru6p_native^PFK2_n_native)*atp/(atp + PFK2_k_atp_native);

  // Reactions:
  GLUT2: $glc_ext -> glc; scale_gly*(GLUT2_Vmax/GLUT2_km)*(glc_ext - glc/GLUT2_keq)/(1 + glc_ext/GLUT2_km + glc/GLUT2_km); GLUT2 is "GLUT2 glucose transporter";
  GK: glc + $atp => glc6p + $adp; scale_gly*GK_Vmax*GK_gc_free*(atp/(GK_km_atp + atp))*(glc^GK_n/(glc^GK_n + GK_km_glc^GK_n)); GK is "Glucokinase";  // modifiers: glc1p, fru6p
  G6PASE: glc6p + $h2o => glc + $phos; scale_gly*G6PASE_Vmax*(glc6p/(G6PASE_km_glc6p + glc6p)); G6PASE is "D-Glucose-6-phosphate Phosphatase";
  GPI: glc6p -> fru6p; scale_gly*(GPI_Vmax/GPI_km_glc6p)*(glc6p - fru6p/GPI_keq)/(1 + glc6p/GPI_km_glc6p + fru6p/GPI_km_fru6p); GPI is "D-Glucose-6-phosphate Isomerase";
  G16PI: glc1p -> glc6p; scale_glyglc*(G16PI_Vmax/G16PI_km_glc1p)*(glc1p - glc6p/G16PI_keq)/(1 + glc1p/G16PI_km_glc1p + glc6p/G16PI_km_glc6p); G16PI is "Glucose 1-phosphate 1,6-phosphomutase";
  UPGASE: utp + glc1p -> udpglc + pp; scale_glyglc*UPGASE_Vmax/(UPGASE_km_utp*UPGASE_km_glc1p)*(utp*glc1p - udpglc*pp/UPGASE_keq)/((1 + utp/UPGASE_km_utp)*(1 + glc1p/UPGASE_km_glc1p) + (1 + udpglc/UPGASE_km_udpglc)*(1 + pp/UPGASE_km_pp) - 1); UPGASE is "UTP:Glucose-1-phosphate uridylyltransferase";
  PPASE: pp + $h2o => 2 $phos; scale_glyglc*PPASE_Vmax*pp/(pp + PPASE_km_pp); PPASE is "Pyrophosphate phosphohydrolase";
  GS: udpglc => udp + glyglc; (1 - gamma)*GS_native + gamma*GS_phospho; GS is "Glycogen synthase";
  GP: glyglc + $phos -> glc1p; (1 - gamma)*GP_native + gamma*GP_phospho; GP is "Glycogen-Phosphorylase";
  NDKGTP: $atp + gdp -> $adp + gtp; scale_gly*NDKGTP_Vmax/(NDKGTP_km_atp*NDKGTP_km_gdp)*(atp*gdp - adp*gtp/NDKGTP_keq)/((1 + atp/NDKGTP_km_atp)*(1 + gdp/NDKGTP_km_gdp) + (1 + adp/NDKGTP_km_adp)*(1 + gtp/NDKGTP_km_gtp) - 1); NDKGTP is "Nucleoside-diphosphate kinase (ATP, GTP)";
  NDKUTP: $atp + udp -> $adp + utp; scale_glyglc*NDKUTP_Vmax/(NDKUTP_km_atp*NDKUTP_km_udp)*(atp*udp - adp*utp/NDKUTP_keq)/((1 + atp/NDKUTP_km_atp)*(1 + udp/NDKUTP_km_udp) + (1 + adp/NDKUTP_km_adp)*(1 + utp/NDKUTP_km_utp) - 1); NDKUTP is "Nucleoside-diphosphate kinase (ATP, UTP)";
  AK: $atp + $amp -> 2 $adp; scale_gly*AK_Vmax/(AK_km_atp*AK_km_amp)*(atp*amp - adp*adp/AK_keq)/((1 + atp/AK_km_atp)*(1 + amp/AK_km_amp) + (1 + adp/AK_km_adp)*(1 + adp/AK_km_adp) - 1); AK is "ATP:AMP phosphotransferase (Adenylatkinase)";
  PFK2: fru6p + $atp => fru26bp + $adp; (1 - gamma)*PFK2_native + gamma*PFK2_phospho; PFK2 is "ATP:D-fructose-6-phosphate 2-phosphotransferase";

  // Unit definitions:
  unit pmol = 1e-12 mole;
  unit s_per_min_kg = second / (60 second * kilogram);
  unit per_mM = metre^3 / mole;
  unit min = 60 second;
  unit mM = mole / metre^3;
  unit m = metre;
  unit mM2 = mole^2 / metre^6;
  unit mumol_per_min_kg = 1e-6 mole / (60 second * kilogram);
  unit s = second;
  unit s_per_min = second / (60 second);
  unit m3 = metre^3;
  unit m2 = metre^2;
  unit kg = kilogram;
  unit mol_per_s = mole / second;
  unit per_s = 1 / second;
  unit pM = 1e-12 mole / litre;
end
